<?xml version="1.0" encoding="UTF-8"?>
<!--
 This file is part of FlightGear, the free flight simulator
 http://www.flightgear.org/

 Copyright (C) 2009 Torsten Dreyer, Torsten (at) t3r _dot_ de

 This program is free software; you can redistribute it and/or
 modify it under the terms of the GNU General Public License as
 published by the Free Software Foundation; either version 2 of the
 License, or (at your option) any later version.

 This program is distributed in the hope that it will be useful, but
 WITHOUT ANY WARRANTY; without even the implied warranty of
 MERCHANTABILITY or FITNESS FOR A PARTICULAR PURPOSE.  See the GNU
 General Public License for more details.
-->
<!-- Generated by Aero-Matic v 0.8

     Inputs:
                horsepower: 200
                     pitch: variable
            max engine rpm: 2575
        prop diameter (ft): 8

     Outputs:
              max prop rpm:2345.38
                gear ratio:   1.10
                       Cp0:0.023635
                       Ct0:0.020326
       static thrust (lbs): 302.51
--><propeller name="prop">
  <ixx> 3.9752 </ixx>
  <diameter unit="IN"> 96.0 </diameter>
  <numblades> 2 </numblades>
  <gearratio>1.0 </gearratio>
  <minpitch> 12 </minpitch>
  <maxpitch> 30 </maxpitch>
  <minrpm>   700 </minrpm>
  <maxrpm>   2575 </maxrpm>

  <table name="C_THRUST" type="internal">
      <tableData>
                12         30
       0.0      0.0203   0.0603
       0.1      0.0186   0.0603
       0.2      0.0169   0.0603
       0.3      0.0141   0.0600
       0.4      0.0107   0.0597
       0.5      0.0073   0.0589
       0.6      0.0031   0.0558
       0.7      -0.0003   0.0502
       0.8      -0.0060   0.0445
       1.0      -0.0130   0.0296
       1.2      -0.0213   0.0158
       1.4      -0.0292   0.0011
       1.6      -0.0382   -0.0130
       1.8      -0.0467   -0.0270
       2.0      -0.0549   -0.0417
       2.2      -0.0630   -0.0567
       2.4      -0.0711   -0.0718
      </tableData>
  </table>

  <table name="C_POWER" type="internal">
     <tableData>
                12         30
       0.0      0.0236   0.0836
       0.1      0.0236   0.0836
       0.2      0.0225   0.0836
       0.3      0.0214   0.0836
       0.4      0.0188   0.0836
       0.5      0.0155   0.0827
       0.6      0.0125   0.0818
       0.7      0.0074   0.0800
       0.8      0.0030   0.0762
       1.0      -0.0089   0.0622
       1.2      -0.0258   0.0418
       1.4      -0.0480   0.0209
       1.6      -0.0709   -0.0018
       1.8      -0.0945   -0.0510
       2.0      -0.1182   -0.1020
       2.2      -0.1418   -0.1531
       2.4      -0.1654   -0.2041
     </tableData>
  </table>

</propeller>
